# Дано:
# Диаметра поршня:
D := 0.091  # м
# Ход поршня:
S := 0.095  # м
# Количество оборотов коленчатого вала двигателяия:
n := 3200
1/мин
# Геометрическая характеристика КШМ:
λ := 54/157 = 0.343949
l_шш := 0.033  # м
l_кш := 0.084  # м
A := π*D^2/4 = 0.00650388
d := 0.054  # м  # Диаметр шатунной шейки
m_ш := 1.16  # кг
d_1 := 0.0738  # м  # Диаметр коренной шейки
m_п := 1.909  # кг
b := 0.02  # м  # Толщина щеки
h := 0.073  # М  # Ширина щеки
m_пк := 0.3  # кг
m_пп := 0.297  # кг
ω := π*n/30 = 335.103  # рад/с
m_п := m_п + m_пк + m_пп = 2.506  # кг
m_1 := m_ш/3 = 0.386667  # кг
R := S/2 = 0.0475  # м
M_1 := m_1/A = 59.4517  # кг/м^2
Y_ц.м.к := 0.031801  # м
m_к := 3.376  # кг
M_2 := (m_ш - m_1)/A = 118.903  # кг/м^2
M_к := m_к*Y_ц.м.к/(R*A) = 347.518  # кг/м^2
R = 0.0475
M_вр := M_к + M_2 = 466.421  # кг
M_пд := (m_п + m_1)/A = 444.76  # кг/м^2
l := 0.385  # м  # Длина коленвала
ρ := 7850  # кг/м^3
m_вр := M_вр*A = 3.03355  # кг
# Определение угла сектора противовеса:
# Предварительные размеры противовеса:
R_1 := d_1/2 + 0.003 = 0.0399  # м
d_1 = 0.0738
R_2 := (R + d_1/2 + 0.01) = 0.0944  # м
3*M_вр*R*A/(4*ρ*b*(R_2^3 - R_1^3)) = 0.885091
3*m_вр*R/(4*ρ*b*(R_2^3 - R_1^3)) = 0.885091
α_пр := 2*asin(3*M_вр*R*A/(4*ρ*b*(R_2^3 - R_1^3))) = 124.525 deg
b
m_вр = 3.03355
М_пр := 1/2*(ρ - b)*(R_2^2 - R_1^2)*α_пр = 62.4376  # кг
R_пр := 4/3*(R_2^3 - R_1^3)*sin(α_пр/2)/((R_2^2 - R_1^2)*α_пр) = 0.0576949  # м
l_0кв := (0.8*l_шш + 0.2*h/R*d_1)*(d_1/d)^4 = 0.171233
