# Дано:
# Диаметра поршня:
D := 0.091  # м
# Ход поршня:
S := 0.095  # м
# Количество оборотов коленчатого вала двигателяия:
n := 3200
1/мин
# Геометрическая характеристика КШМ:
λ := 54/157 = 0.343949
d := 54  # Диаметр шатунной шейки
d_1 := 67.8  # Диаметр коренной шейки
l_шш := 0.033
l_кш := 0.084
b := 20  # Толщина щеки
h := □  # error: Пустой местозаполнитель.  # Ширина щеки
r := 0.2*b = 4
r := 0.007
ω := π*n/30
ω = 335.103  # рад/с
R := S/2 = 0.0475  # мм
A := π*D^2/4 = 0.00650388  # мм
ΣP_j1 == m_пд*R*ω^2*(cosα + cos(α + 180)) == 0
ΣP_j2 == m_пд*λ*R*ω^2*(cos2α + cos2(α + 180)) == 2*m_пд*λ*R*ω^2*cos2α
ΣP_c == 0  # т .к. они противонаправлены
# Запишем уравновешивание моментов относительно оси О-О
M_1 == m_пд*R*ω^2*cosα*a_1
M_2 == 0
M_c == m_пд*R*ω^2*a_1
ρ := 7820  # кг/м^3
M := 19.457  # кг
Y_цм := 47.75  # мм
# - расстояние от оси коренной шейки
# до центра масс колена вала
M_k := M*Y_цм*10^-3/(R*A) = 3007.34  # кг/м^2
M_пд := 250
M_2 := 2*M_пд/3 = 166.667
M_вр := M_k + M_2
M_вр = 3174.01  # кг/м^2
# Определение угла сектора противовеса:
# Предварительные размеры противовеса:
l := l_шш + l_кш + 2*b = 40.117
R_2 := (R + d/2 + 0.005) = 27.0525  # м
R_1 := d_1/2 + 0.005 = 33.905  # м
b = 20
α_пр := 2*asin(3*M_вр*R*l/(2*ρ*b*h*(R_2^3 - R_1^3)))
l := l_шш + l_кш + 2*b = 40.117
b_пр := b
M_вр := 37
R_2 := 0.143  # м
R_1 := 0.060  # м
α_пр := 2*asin(3*M_вр*R*l/(2*ρ*b_пр*1*(R_2^3 - R_1^3))) = 28.918 deg
М_пр := 1/2*(ρ - b)*(R_2^2 - R_1^2) = 65.7111  # кг
R_пр := 4/3*(R_2^3 - R_1^3)*sin(α_пр/2)/((R_2^2 - R_1^2)*α_пр) = 0.106022  # м
M_вр := M_k + M_2
a := l_шш + l_кш = 0.117
b := 2*l_шш + l_кш = 0.15
M_вр*R*a/b = 117.597
1/8*М_пр*R*λ = 0.134195
J_кв := 0.280  # кг*м^2
M_пд = 250  # кг/м^2
M_экв := M_пд/2*(1 + λ^2/4)
M_экв = 128.697  # кг/м^2
J_мм := J_кв + (M_2 + M_экв)*A*R^2
J_мм = 0.284334  # кг*м^2
α := 0 .. 720  # град
M_kp1(α) := T(α)*R*A*10^6  # error: Значение должно быть функцией, но имеет форму: плотность магнитного потока.  # Н*м
M_kp(α) := M_kp1(α) + {
    M_kp1(α + 180 - 720) if (α + 180) > 720
    M_kp1(α + 180) if (α + 180) ≤ 720
}
M_cp := 1/720*integral(M_kp(α), α = 0 .. 720)
M_cp =  # error: Эта переменная не определена.  # Н*м
# Примем значение момента сопротивления равным среднему движущему
# моменту, т.к. режим работы установившийся
M_сопр := M_cp
A_изб(α) := integral(M_kp(α) - M_сопр, α = 0 .. α)  # избыточная работа
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